# OpenSim document version 40000
MarkerSet:
  Marker RHEAD: head (0.03 0.2285 0.086)
  Marker LHEAD: head (0.03 0.2285 -0.086)
  Marker SPNE: torso (-0.1039813 0.1256958 0.0007664021)
  Marker RSHOL: torso (-0.07156302 0.4193155 0.09762037)
  Marker LSHOL: torso (-0.0669865 0.4136532 -0.0948004)
  Marker CHST: torso (0.08260222 0.3367634 0.001400643)
  Marker RELB: humerus_r_offset (0.001192948 -0.2518226 0.05042261)
  Marker RHND: hand_r (-0.02932794 -0.001210478 -0.0005301956)
  Marker STOM: torso (0.1140728 0.08958156 0.003075664)
  Marker LELB: humerus_l_offset (-0.005931183 -0.2413256 -0.05325098)
  Marker LHND: hand_l (-0.01946209 0.00955534 -0.0006008207)
  Marker RWAST: pelvis_offset (-0.06900201 0.03957797 0.134772)
  Marker RHIP: femur_r (-0.011282 -0.08844213 0.0604988)
  Marker LKNEE: femur_l_offset (0.01680498 -0.4016938 -0.0570015)
  Marker RANKL: tibia_r_offset (0.007835149 -0.3672836 0.05191912)
  Marker RCLF: tibia_r (-0.08297194 -0.1318197 0.009028163)
  Marker LWAST: pelvis_offset (-0.07606829 0.04566546 -0.1458473)
  Marker LHIP: femur_l (0.002515508 -0.09443367 -0.06416732)
  Marker RKNEE: femur_r_offset (0.01241592 -0.3973506 0.05569811)
  Marker LANKL: tibia_l_offset (-0.01719006 -0.3859461 -0.06144263)
  Marker LCLF: tibia_l (-0.07872296 -0.1306226 -0.01561253)
